*Heading
** Job name: example3 Model name: Model-1
** Generated by: Abaqus/CAE 2020
*Preprint, echo=NO, model=NO, history=NO, contact=NO
**
** PARTS
**
*Part, name=Part-1
*Node
      1,    9.5949297,  -2.81732559,          20.
      2,   8.41253567,  -5.40640831,          20.
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*Element, type=S4R
  1,  22,   1,  23,  44
  2,   1,   2,  24,  23
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*Nset, nset=_PickedSet2, internal, generate
   1,  176,    1
*Elset, elset=_PickedSet2, internal, generate
   1,  154,    1
** Section: Section-2
*Shell Section, elset=_PickedSet2, material=Steel
2., 5
*End Part
**
*Part, name=Part-2
*Node
      1,         -15.,         -10.,          20.
      2,         -15.,          -8.,          20.
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*Element, type=C3D8R
   1,  122,  123,  134,  133,    1,    2,   13,   12
   2,  123,  124,  135,  134,    2,    3,   14,   13
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*Nset, nset=_PickedSet2, internal, generate
    1,  1936,     1
*Elset, elset=_PickedSet2, internal, generate
    1,  1500,     1
** Section: Section-1
*Solid Section, elset=_PickedSet2, material=Steel
,
*End Part
**
**
** ASSEMBLY
**
*Assembly, name=Assembly
**
*Instance, name=Part-1-1, part=Part-1
          0.,           0.,          20.
*End Instance
**
*Instance, name=Part-2-1, part=Part-2
*End Instance
**
*Node
      1,           0., -6.123234e-16,          40.
*Nset, nset=Set-2
 1,
*Nset, nset=Set-4, instance=Part-2-1
  111,  112,  113,  114,  115,  116
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*Nset, nset=m_Set-5, instance=Part-1-1, generate
 155,  176,    1
*Elset, elset=m_Set-5, instance=Part-1-1, generate
 133,  154,    1
*Nset, nset=_PickedSet7, internal, instance=Part-1-1, generate
  1,  22,   1
*Elset, elset=_PickedSet7, internal, instance=Part-1-1, generate
  1,  22,   1
*Nset, nset=_PickedSet8, internal
 1,
*Elset, elset=_s_Surf-2_S3, internal, instance=Part-2-1
    1,    2,    3,    4,    5,    6
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*Surface, type=ELEMENT, name=s_Surf-2
_s_Surf-2_S3, S3
*Elset, elset=__PickedSurf11_SPOS, internal, instance=Part-1-1, generate
   1,  154,    1
*Surface, type=ELEMENT, name=_PickedSurf11, internal
__PickedSurf11_SPOS, SPOS
*Surface, type=NODE, name=_PickedSet7_CNS_, internal
_PickedSet7, 1.
*Surface, type=NODE, name=m_Set-5_CNS_, internal
m_Set-5, 1.
** Constraint: Constraint-1
*MPC
BEAM, _PickedSet7, _PickedSet8
** Constraint: Constraint-2
*Tie, name=Constraint-2, adjust=yes
s_Surf-2, m_Set-5_CNS_
*End Assembly
**
** MATERIALS
**
*Material, name=Steel
*Density
 7.85e-09,
*Elastic
210000., 0.3
** ----------------------------------------------------------------
**
** STEP: Step-1
**
*Step, name=Step-1, nlgeom=YES
*Static
1., 1., 1e-05, 1.
**
** BOUNDARY CONDITIONS
**
** Name: BC-1 Type: Displacement/Rotation
*Boundary
Set-4, 1, 1
Set-4, 2, 2
Set-4, 3, 3
Set-4, 4, 4
Set-4, 5, 5
Set-4, 6, 6
**
** LOADS
**
** Name: Load-1   Type: Pressure
*Dsload
_PickedSurf11, P, 0.01
**
** OUTPUT REQUESTS
**
*Restart, write, frequency=0
**
** FIELD OUTPUT: F-Output-1
**
*Output, field, variable=PRESELECT
**
** HISTORY OUTPUT: H-Output-1
**
*Output, history, variable=PRESELECT
*End Step
** ----------------------------------------------------------------
**
** STEP: Step-2
**
*Step, name=Step-2, nlgeom=YES
*Dynamic,application=QUASI-STATIC,initial=NO
1.,1.,1e-05
**
** BOUNDARY CONDITIONS
**
** Name: BC-2 Type: Displacement/Rotation
*Boundary
Set-2, 1, 1
Set-2, 2, 2
Set-2, 3, 3, -1.
Set-2, 4, 4
Set-2, 5, 5
Set-2, 6, 6
**
** LOADS
**
** Name: Load-1   Type: Pressure
*Dsload
_PickedSurf11, P, 0.01
**
** OUTPUT REQUESTS
**
*Restart, write, frequency=0
**
** FIELD OUTPUT: F-Output-1
**
*Output, field, variable=PRESELECT, frequency=1
**
** HISTORY OUTPUT: H-Output-1
**
*Output, history, variable=PRESELECT, frequency=1
*End Step
